# OpenSim document version 40000
ScaleTool ADDS_Model-scaled:
  mass: 1.397069 [kg]
  height: -1
  age: -1
  ModelScaler:
    apply: true
    scaling_order: measurements
    marker_file: 90_lb_Static.trc
    time_range: 0 0.03
    preserve_mass_distribution: false
    MeasurementSet:
      Measurement RightShank: apply=true
        MarkerPair: markers=(MMAL Shank)
        MarkerPair: markers=(LMAL Shank)
        MarkerPair: markers=(SpringTop Shank)
        BodyScale RightShank: axes=(X Y Z)
      Measurement rightfoot: apply=true
        MarkerPair: markers=(Heel Toe)
        MarkerPair: markers=(Heel MP5)
        BodyScale rightfoot: axes=(X Y Z)
  MarkerPlacer:
    apply: true
    marker_file: Data\Static.trc
    time_range: 0 0.03
    max_marker_movement: -1
    IKTaskSet:
      IKMarkerTask Heel: apply=true weight=2
      IKMarkerTask SpringTop: apply=true weight=2
      IKMarkerTask Toe: apply=true weight=1
      IKMarkerTask MP5: apply=true weight=1
      IKMarkerTask Shank: apply=false weight=0.5
      IKMarkerTask LMAL: apply=true weight=2
      IKMarkerTask MMAL: apply=true weight=2
      IKMarkerTask Foot: apply=false weight=1
